# LAMMPS Input File (License CC BY 4.0)

units real
dimension 3
boundary p p p

atom_style full
bond_style harmonic
angle_style harmonic

pair_style lj/cut/coul/long 17
pair_modify mix arithmetic

kspace_style ewald 1.0e-5
kspace_modify gewald 0.1622 kmax/ewald 6 6 6
