# LAMMPS Input File (License CC BY 4.0)

variable temp equal 84 # K
variable cut_off equal 9

units real
dimension 3
atom_style full
boundary p p p

pair_style lj/cut ${cut_off}
# pair_modify shift yes
