# LAMMPS Input File (License CC BY 4.0)

variable number equal 1
variable seed equal 87669

include header.lmp

units real
dimension 3
atom_style full
boundary p p p

pair_style lj/cut ${cut_off}
# pair_modify shift yes

read_data empty-pore.data
include parameters.inc

create_atoms 1 random ${number} 12345 NULL overlap 2.0 maxtry 5

run 0

write_data topology.data nocoeff
